*Heading
** Job name: FYZ Model name: Model-1
** Generated by: Abaqus/CAE 2017
*Preprint, echo=NO, model=NO, history=NO, contact=NO
**
** PARTS
**
*Part, name=Part-1
*Node
      1,          7.5,          7.5,           0.
      2,          7.5,         -7.5,           0.
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*Element, type=C3D8R
   1,  275,  276,   83,   84, 2047, 2048,  418,  419
   2,  276,  257,   82,   83, 2048, 2029,  417,  418
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*Nset, nset=Set-1
    4,   10,   63,   64,   65,   66
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*Elset, elset=Set-1, generate
 1801,  4275,     1
*Nset, nset=Set-3
    1,    2,    3,    4,    5,    6
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*Elset, elset=Set-3, generate
    1,  1800,     1
** Section: Matrix
*Solid Section, elset=Set-3, material=Matrix
,
*Orientation, name=Ori-2
1., 0., 0., 0., 1., 0.
1, 0.
** Section: Fibre
*Solid Section, elset=Set-1, orientation=Ori-2, material=Fibre
,
*End Part
**
**
** ASSEMBLY
**
*Assembly, name=Assembly
**
*Instance, name=Part-1-1, part=Part-1
*End Instance
**
*Elset, elset=_Surf-1_S1, internal, instance=Part-1-1, generate
   1,  120,    1
*Elset, elset=_Surf-1_S2, internal, instance=Part-1-1, generate
 1801,  1965,     1
*Surface, type=ELEMENT, name=Surf-1
_Surf-1_S1, S1
_Surf-1_S2, S2
*Elset, elset=_Surf-2_S2, internal, instance=Part-1-1, generate
 1681,  1800,     1
*Elset, elset=_Surf-2_S1, internal, instance=Part-1-1, generate
 4111,  4275,     1
*Surface, type=ELEMENT, name=Surf-2
_Surf-2_S2, S2
_Surf-2_S1, S1
*Elset, elset=_Surf-3_S4, internal, instance=Part-1-1
    6,   21,   24,   27,   62,   64
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*Elset, elset=_Surf-3_S5, internal, instance=Part-1-1
    7,    8,   67,  127,  128,  187
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*Elset, elset=_Surf-3_S6, internal, instance=Part-1-1
   34,   37,   40,   43,  154,  157
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*Surface, type=ELEMENT, name=Surf-3
_Surf-3_S4, S4
_Surf-3_S5, S5
_Surf-3_S6, S6
*Elset, elset=_Surf-4_S4, internal, instance=Part-1-1
   53,   55,   93,   96,   99,  120
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*Elset, elset=_Surf-4_S5, internal, instance=Part-1-1
   56,  104,  105,  106,  176,  224
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*Elset, elset=_Surf-4_S6, internal, instance=Part-1-1
   71,   74,   77,   80,  191,  194
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*Surface, type=ELEMENT, name=Surf-4
_Surf-4_S4, S4
_Surf-4_S5, S5
_Surf-4_S6, S6
*Elset, elset=_Surf-5_S4, internal, instance=Part-1-1
   67,   68,   84,   86,   88,   90
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*Elset, elset=_Surf-5_S5, internal, instance=Part-1-1
   69,  119,  120,  189,  239,  240
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*Elset, elset=_Surf-5_S6, internal, instance=Part-1-1
  100,  102,  220,  222,  340,  342
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*Surface, type=ELEMENT, name=Surf-5
_Surf-5_S4, S4
_Surf-5_S5, S5
_Surf-5_S6, S6
*Elset, elset=_Surf-6_S4, internal, instance=Part-1-1
    3,    4,   29,   31,   33,   56
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*Elset, elset=_Surf-6_S5, internal, instance=Part-1-1
    5,    6,   46,   47,  125,  126
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*Elset, elset=_Surf-6_S6, internal, instance=Part-1-1
   13,   15,   17,  133,  135,  137
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*Surface, type=ELEMENT, name=Surf-6
_Surf-6_S4, S4
_Surf-6_S5, S5
_Surf-6_S6, S6
*Elset, elset=_Surf-7_S1, internal, instance=Part-1-1, generate
   1,  120,    1
*Elset, elset=_Surf-7_S2, internal, instance=Part-1-1, generate
 1801,  1965,     1
*Surface, type=ELEMENT, name=Surf-7
_Surf-7_S1, S1
_Surf-7_S2, S2
*Elset, elset=_Surf-8_S4, internal, instance=Part-1-1
    6,   21,   24,   27,   62,   64
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*Elset, elset=_Surf-8_S5, internal, instance=Part-1-1
    7,    8,   67,  127,  128,  187
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*Elset, elset=_Surf-8_S6, internal, instance=Part-1-1
   34,   37,   40,   43,  154,  157
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*Surface, type=ELEMENT, name=Surf-8
_Surf-8_S4, S4
_Surf-8_S5, S5
_Surf-8_S6, S6
*Elset, elset=_Surf-9_S2, internal, instance=Part-1-1, generate
 1681,  1800,     1
*Elset, elset=_Surf-9_S1, internal, instance=Part-1-1, generate
 4111,  4275,     1
*Surface, type=ELEMENT, name=Surf-9
_Surf-9_S2, S2
_Surf-9_S1, S1
*Elset, elset=_Surf-10_S4, internal, instance=Part-1-1
   53,   55,   93,   96,   99,  120
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*Elset, elset=_Surf-10_S5, internal, instance=Part-1-1
   56,  104,  105,  106,  176,  224
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*Elset, elset=_Surf-10_S6, internal, instance=Part-1-1
   71,   74,   77,   80,  191,  194
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*Surface, type=ELEMENT, name=Surf-10
_Surf-10_S4, S4
_Surf-10_S5, S5
_Surf-10_S6, S6
*Elset, elset=_Surf-11_S1, internal, instance=Part-1-1, generate
   1,  120,    1
*Elset, elset=_Surf-11_S2, internal, instance=Part-1-1, generate
 1801,  1965,     1
*Surface, type=ELEMENT, name=Surf-11
_Surf-11_S1, S1
_Surf-11_S2, S2
*Elset, elset=_Surf-12_S4, internal, instance=Part-1-1
   67,   68,   84,   86,   88,   90
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*Elset, elset=_Surf-12_S5, internal, instance=Part-1-1
   69,  119,  120,  189,  239,  240
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*Elset, elset=_Surf-12_S6, internal, instance=Part-1-1
  100,  102,  220,  222,  340,  342
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*Surface, type=ELEMENT, name=Surf-12
_Surf-12_S4, S4
_Surf-12_S5, S5
_Surf-12_S6, S6
*Elset, elset=_Surf-13_S2, internal, instance=Part-1-1, generate
 1681,  1800,     1
*Elset, elset=_Surf-13_S1, internal, instance=Part-1-1, generate
 4111,  4275,     1
*Surface, type=ELEMENT, name=Surf-13
_Surf-13_S2, S2
_Surf-13_S1, S1
*Elset, elset=_Surf-14_S4, internal, instance=Part-1-1
    3,    4,   29,   31,   33,   56
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*Elset, elset=_Surf-14_S5, internal, instance=Part-1-1
    5,    6,   46,   47,  125,  126
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*Elset, elset=_Surf-14_S6, internal, instance=Part-1-1
   13,   15,   17,  133,  135,  137
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*Surface, type=ELEMENT, name=Surf-14
_Surf-14_S4, S4
_Surf-14_S5, S5
_Surf-14_S6, S6
*Elset, elset=_Surf-15_S4, internal, instance=Part-1-1
    6,   21,   24,   27,   62,   64
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*Elset, elset=_Surf-15_S5, internal, instance=Part-1-1
    7,    8,   67,  127,  128,  187
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*Elset, elset=_Surf-15_S6, internal, instance=Part-1-1
   34,   37,   40,   43,  154,  157
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*Surface, type=ELEMENT, name=Surf-15
_Surf-15_S4, S4
_Surf-15_S5, S5
_Surf-15_S6, S6
*Elset, elset=_Surf-16_S4, internal, instance=Part-1-1
   67,   68,   84,   86,   88,   90
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*Elset, elset=_Surf-16_S5, internal, instance=Part-1-1
   69,  119,  120,  189,  239,  240
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*Elset, elset=_Surf-16_S6, internal, instance=Part-1-1
  100,  102,  220,  222,  340,  342
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*Surface, type=ELEMENT, name=Surf-16
_Surf-16_S4, S4
_Surf-16_S5, S5
_Surf-16_S6, S6
*Elset, elset=_Surf-17_S4, internal, instance=Part-1-1
   53,   55,   93,   96,   99,  120
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*Elset, elset=_Surf-17_S5, internal, instance=Part-1-1
   56,  104,  105,  106,  176,  224
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*Elset, elset=_Surf-17_S6, internal, instance=Part-1-1
   71,   74,   77,   80,  191,  194
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*Surface, type=ELEMENT, name=Surf-17
_Surf-17_S4, S4
_Surf-17_S5, S5
_Surf-17_S6, S6
*Elset, elset=_Surf-18_S4, internal, instance=Part-1-1
    3,    4,   29,   31,   33,   56
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*Elset, elset=_Surf-18_S5, internal, instance=Part-1-1
    5,    6,   46,   47,  125,  126
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*Elset, elset=_Surf-18_S6, internal, instance=Part-1-1
   13,   15,   17,  133,  135,  137
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*Surface, type=ELEMENT, name=Surf-18
_Surf-18_S4, S4
_Surf-18_S5, S5
_Surf-18_S6, S6
*End Assembly
**
** MATERIALS
**
*Material, name=Fibre
*Elastic, type=ENGINEERING CONSTANTS
74000.,74000.,74000.,   0.2,   0.2,   0.2,30800.,30800.
30800.,
*Material, name=Matrix
*Elastic
3350., 0.35
** ----------------------------------------------------------------
**
** STEP: Step-1
**
*Step, name=Step-1, nlgeom=NO
*Static, direct
0.1, 1.,
**
** LOADS
**
** Name: SYZ_yzn   Type: Surface traction
*Dsload
Surf-17, TRSHR, 10., 0., 0., -1.
** Name: SYZ_yzp   Type: Surface traction
*Dsload
Surf-15, TRSHR, 10., 0., 0., 1.
** Name: SYZ_zyn   Type: Surface traction
*Dsload
Surf-18, TRSHR, 10., 0., -1., 0.
** Name: SYZ_zyp   Type: Surface traction
*Dsload
Surf-16, TRSHR, 10., 0., 1., 0.
**
** OUTPUT REQUESTS
**
*Restart, write, frequency=0
**
** FIELD OUTPUT: F-Output-1
**
*Output, field
*Node Output
U,
*Element Output, directions=YES
ESOL, EVOL, IVOL, S, SVOL
**
** HISTORY OUTPUT: H-Output-1
**
*Output, history, variable=PRESELECT
*End Step
